// COMSOL Multiphysics 6.3.0.420 model "BVAM-2d.mph"
// Outline of the model tree

Parameters
  eta = 1
  a = 1.1
  H = -1
  b = -0.5
  C = 0.4
  du = 0.1
  dv = 1
  u1 = 0
  v1 = 0
  u2 = ((a+b)*C+sqrt(a+b)*sqrt((4+C*C)*b+a*(C*C-4*H)))/(2*(1+H))
  v2 = -(C/2)-(sqrt((4+C*C)*b+a*(C*C-4*H)))/(2*sqrt(a+b))
  u3 = ((a+b)*C-sqrt(a+b)*sqrt((4+C*C)*b+a*(C*C-4*H)))/(2*(1+H))
  v3 = -(C/2)+(sqrt((4+C*C)*b+a*(C*C-4*H)))/(2*sqrt(a+b))
  u0 = u1
  v0 = v1

Functions
  rn1: Random | nargs = 2; uniformrange = 0.1; seed = 113013

Geometry
  geom1 "Geometry 1" (2D, length unit m)
    sq1: Square | size = 50; base = center
    fin: Finalize "Form Union"

Physics
  c: CoefficientFormPDE on all domains
    dependent variable U = {u, v}
    EquationForm.form = Automatic
    cfeq1: CoefficientFormPDE (default)
      c = {{du, 0, 0, du}, {0, 0, 0, 0}, {0, 0, 0, 0}, {dv, 0, 0, dv}}
      f = {eta*(u+a*v-C*u*v-u*v*v), eta*(H*u+b*v+C*u*v+u*v*v)}
      da = {1, 0, 0, 1}
    zflx1: ZeroFluxBoundary "Zero Flux 1" (default)
    init1: init "Initial Values 1" (default) | u = u0+rn1(x,y); v = v0+rn1(x,y)

Mesh
  mesh1 "Mesh 1" (physics-controlled)
    size: MeshSizeDefault | hauto = 1

Studies
  std1 "Study 1"
    time: Transient "Time Dependent" | tlist = range(0,10,10000)

Solver configurations
  sol1 "Solution 1" (study std1)
    v1: Variables "Dependent Variables 1"
    t1: Time "Time-Dependent Solver 1" | tlist = range(0,10,10000)
      dDef: Direct
      fc1: FullyCoupled | linsolver = dDef

Datasets
  dset1: Solution | solution = sol1

Plots
  pg1: PlotGroup2D "Coefficient Form PDE" | data = dset1
    surf1: Surface | data = dset1; expr = u

Exports
  plot1: Plot
  data1: Data | data = dset1; expr = u; unit = 1; filename = /Users/joseluis/Desktop/Figure6a.txt